T_h := 600/168 = 3.57143
t := 3*168 = 504
З_о := T_h*t = 1800
З_о := З_о*1.5 = 2700
Н_д := 15
З_д := З_о*Н_д/100 = 405
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Н_соц := 34.6
З_соц := (З_о + З_д)*Н_соц/100 = 1074.33
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Н_пз := 100
З_пз := З_о*Н_пз/100 = 2700
С_п := З_о + З_д + З_соц + З_пз = 6879.33
# оценка эффективности от продаж ПО
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N := 100
У_р := 50
П_ед := С_п*У_р*1.1/(N*100) = 37.8363
П := П_ед*N = 3783.63
Ц := С_п*1.1/100 + П_ед + 0.2*С_п*1.1 = 1626.96
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Н_приб := 18
Н_недв := 1
ЧП := П - П*(Н_приб + Н_недв)/100 = 3064.74
